[c, s, 0, 0; -s, c, 0, 0; 0, 0, 1, 0; 0, 0, 0, 1]*[a1, b1, 0, 0; b1, a2, b2, 0; 0, b2, a3, b3; 0, 0, b3, a4]*[c, -s, 0, 0; s, c, 0, 0; 0, 0, 1, 0; 0, 0, 0, 1] simplify → [
    a1*c^2 + 2*b1*c*s + a2*s^2, b1*c^2 - b1*s^2 - a1*c*s + a2*c*s, b2*s, 0;
    b1*c^2 - b1*s^2 - a1*c*s + a2*c*s, a2*c^2 - 2*b1*c*s + a1*s^2, b2*c, 0;
    b2*s, b2*c, a3, b3;
    0, 0, b3, a4
]
[cos0, -sin0, 0, 0; sin0, cos0, 0, 0; 0, 0, 1, 0; 0, 0, 0, 1]*[a1, b1, 0, 0; b1, a2, b2, 0; 0, b2, a3, b3; 0, 0, b3, a4]*[cos0, sin0, 0, 0; -sin0, cos0, 0, 0; 0, 0, 1, 0; 0, 0, 0, 1]
[1, 0, 0, 0, 0; 0, cos1, -sin1, 0, 0; 0, sin1, cos1, 0, 0; 0, 0, 0, 1, 0; 0, 0, 0, 0, 1]*[a1, b1, P, 0, 0; b1, a2, b2, 0, 0; P, b2, a3, b3, 0; 0, 0, b3, a4, b4; 0, 0, 0, b4, a5]*[1, 0, 0, 0, 0; 0, cos1, sin1, 0, 0; 0, -sin1, cos1, 0, 0; 0, 0, 0, 1, 0; 0, 0, 0, 0, 1] simplify → [
    a1, b1*cos1 - P*sin1, P*cos1 + b1*sin1, 0, 0;
    b1*cos1 - P*sin1, a2*cos1^2 - 2*b2*cos1*sin1 + a3*sin1^2, b2*cos1^2 - b2*sin1^2 + a2*cos1*sin1 - a3*cos1*sin1, -b3*sin1, 0;
    P*cos1 + b1*sin1, b2*cos1^2 - b2*sin1^2 + a2*cos1*sin1 - a3*cos1*sin1, a3*cos1^2 + 2*b2*cos1*sin1 + a2*sin1^2, b3*cos1, 0;
    0, -b3*sin1, b3*cos1, a4, b4;
    0, 0, 0, b4, a5
]
([
    1, 0, 0, 0, 0, 0;
    0, 1, 0, 0, 0, 0;
    0, 0, c, -s, 0, 0;
    0, 0, s, c, 0, 0;
    0, 0, 0, 0, 1, 0;
    0, 0, 0, 0, 0, 1
]*[
    a[k - 2], b[k - 2], 0, 0, 0, 0;
    b[k - 2], a[k - 1], b[k - 1], P, 0, 0;
    0, b[k - 1], a[k], b[k], 0, 0;
    0, P, b[k], a[k + 1], b[k + 1], 0;
    0, 0, 0, b[k + 1], a[k + 2], b[k + 2];
    0, 0, 0, 0, b[k + 2], a[k + 3]
] + [
    U, 0, 0, 0, 0, 0;
    0, U, 0, 0, 0, 0;
    0, 0, U, 0, 0, 0;
    0, 0, 0, U, 0, 0;
    0, 0, 0, 0, U, 0;
    0, 0, 0, 0, 0, U
])*[
    1, 0, 0, 0, 0, 0;
    0, 1, 0, 0, 0, 0;
    0, 0, c, s, 0, 0;
    0, 0, -s, c, 0, 0;
    0, 0, 0, 0, 1, 0;
    0, 0, 0, 0, 0, 1
] simplify → [
    U + a[k - 2], b[k - 2], 0, 0, 0, 0;
    b[k - 2], U + a[k - 1], c*b[k - 1] - P*s, s*b[k - 1] + P*c, 0, 0;
    0, c*b[k - 1] - P*s, a[k]*c^2 - 2*b[k]*c*s + U*c + a[k + 1]*s^2, c^2*b[k] - s^2*b[k] + U*s + c*s*a[k] - c*s*a[k + 1], -s*b[k + 1], 0;
    0, s*b[k - 1] + P*c, c^2*b[k] - s^2*b[k] - U*s + c*s*a[k] - c*s*a[k + 1], a[k + 1]*c^2 + 2*b[k]*c*s + U*c + a[k]*s^2, c*b[k + 1], 0;
    0, 0, -s*b[k + 1], c*b[k + 1], U + a[k + 2], b[k + 2];
    0, 0, 0, 0, b[k + 2], U + a[k + 3]
]
[
    1, 0, 0, 0, 0, 0;
    0, 1, 0, 0, 0, 0;
    0, 0, 1, 0, 0, 0;
    0, 0, 0, 1, 0, 0;
    0, 0, 0, 0, cosN, -sinN;
    0, 0, 0, 0, sinN, cosN
]*[
    1, 1, 0, 0, 0, 0;
    1, 1, 1, 0, 0, 0;
    0, 1, 1, b3, 0, 0;
    0, 0, b3, a1, b1, P;
    0, 0, 0, b1, a2, b2;
    0, 0, 0, P, b2, a3
]*[
    1, 0, 0, 0, 0, 0;
    0, 1, 0, 0, 0, 0;
    0, 0, 1, 0, 0, 0;
    0, 0, 0, 1, 0, 0;
    0, 0, 0, 0, cosN, sinN;
    0, 0, 0, 0, -sinN, cosN
] simplify → [
    1, 1, 0, 0, 0, 0;
    1, 1, 1, 0, 0, 0;
    0, 1, 1, b3, 0, 0;
    0, 0, b3, a1, b1*cosN - P*sinN, P*cosN + b1*sinN;
    0, 0, 0, b1*cosN - P*sinN, a2*cosN^2 - 2*b2*cosN*sinN + a3*sinN^2, b2*cosN^2 - b2*sinN^2 + a2*cosN*sinN - a3*cosN*sinN;
    0, 0, 0, P*cosN + b1*sinN, b2*cosN^2 - b2*sinN^2 + a2*cosN*sinN - a3*cosN*sinN, a3*cosN^2 + 2*b2*cosN*sinN + a2*sinN^2
]
[
    1, 0, 0, 0, 0, 0;
    0, 1, 0, 0, 0, 0;
    0, 0, c, s, 0, 0;
    0, 0, -s, c, 0, 0;
    0, 0, 0, 0, 1, 0;
    0, 0, 0, 0, 0, 1
]*[
    a[k - 2], b[k - 2], 0, 0, 0, 0;
    b[k - 2], a[k - 1], b[k - 1], P, 0, 0;
    0, b[k - 1], a[k], b[k], 0, 0;
    0, P, b[k], a[k + 1], b[k + 1], 0;
    0, 0, 0, b[k + 1], a[k + 2], b[k + 2];
    0, 0, 0, 0, b[k + 2], a[k + 3]
]*[
    1, 0, 0, 0, 0, 0;
    0, 1, 0, 0, 0, 0;
    0, 0, c, -s, 0, 0;
    0, 0, s, c, 0, 0;
    0, 0, 0, 0, 1, 0;
    0, 0, 0, 0, 0, 1
] simplify → [
    a[k - 2], b[k - 2], 0, 0, 0, 0;
    b[k - 2], a[k - 1], c*b[k - 1] + P*s, P*c - s*b[k - 1], 0, 0;
    0, c*b[k - 1] + P*s, a[k]*c^2 + 2*b[k]*c*s + a[k + 1]*s^2, c^2*b[k] - s^2*b[k] - c*s*a[k] + c*s*a[k + 1], s*b[k + 1], 0;
    0, P*c - s*b[k - 1], c^2*b[k] - s^2*b[k] - c*s*a[k] + c*s*a[k + 1], a[k + 1]*c^2 - 2*b[k]*c*s + a[k]*s^2, c*b[k + 1], 0;
    0, 0, s*b[k + 1], c*b[k + 1], a[k + 2], b[k + 2];
    0, 0, 0, 0, b[k + 2], a[k + 3]
]
[1, 0, 0, 0; 0, 1, 0, 0; 0, 0, c, s; 0, 0, -s, c]*[
    a[n - 3], b[n - 3], 0, 0;
    b[n - 3], a[n - 2], b[n - 2], P;
    0, b[n - 2], a[n - 1], b[n - 1];
    0, P, b[n - 1], a[n]
]*[1, 0, 0, 0; 0, 1, 0, 0; 0, 0, c, -s; 0, 0, s, c] simplify → [
    a[n - 3], b[n - 3], 0, 0;
    b[n - 3], a[n - 2], c*b[n - 2] + P*s, P*c - s*b[n - 2];
    0, c*b[n - 2] + P*s, a[n - 1]*c^2 + 2*b[n - 1]*c*s + a[n]*s^2, c^2*b[n - 1] - s^2*b[n - 1] + c*s*a[n] - c*s*a[n - 1];
    0, P*c - s*b[n - 2], c^2*b[n - 1] - s^2*b[n - 1] + c*s*a[n] - c*s*a[n - 1], a[n]*c^2 - 2*b[n - 1]*c*s + a[n - 1]*s^2
]
[
    1, 0, 0, 0, 0, 0;
    0, 1, 0, 0, 0, 0;
    0, 0, c, -s, 0, 0;
    0, 0, s, c, 0, 0;
    0, 0, 0, 0, 1, 0;
    0, 0, 0, 0, 0, 1
]*[
    a[k - 2], b[k - 2], 0, 0, 0, 0;
    b[k - 2], a[k - 1], b[k - 1], P, 0, 0;
    0, b[k - 1], a[k], b[k], 0, 0;
    0, P, b[k], a[k + 1], b[k + 1], 0;
    0, 0, 0, b[k + 1], a[k + 2], b[k + 2];
    0, 0, 0, 0, b[k + 2], a[k + 3]
] → [
    a[k - 2], b[k - 2], 0, 0, 0, 0;
    b[k - 2], a[k - 1], b[k - 1], P, 0, 0;
    0, c*b[k - 1] - P*s, c*a[k] - s*b[k], c*b[k] - s*a[k + 1], -s*b[k + 1], 0;
    0, s*b[k - 1] + P*c, c*b[k] + s*a[k], c*a[k + 1] + s*b[k], c*b[k + 1], 0;
    0, 0, 0, b[k + 1], a[k + 2], b[k + 2];
    0, 0, 0, 0, b[k + 2], a[k + 3]
]
a1 := a[1]
b1 := b[1]
c := a1/sqrt(a1^2 + b1^2)
s := -b1/sqrt(a1^2 + b1^2)
Q1 := [c, -s, 0, 0; s, c, 0, 0; 0, 0, 1, 0; 0, 0, 0, 1]
T := [a[1], b[1], 0, 0; b[1], a[2], b[2], 0; 0, b[2], a[3], b[3]; 0, 0, b[3], a[4]]
Q1*T*transpose(Q1) → [
    (a[1]*b[1]/sqrt(a[1]^2 + b[1]^2) + a[2]*b[1]/sqrt(a[1]^2 + b[1]^2))*b[1]/sqrt(a[1]^2 + b[1]^2) + (a[1]^2/sqrt(a[1]^2 + b[1]^2) + b[1]^2/sqrt(a[1]^2 + b[1]^2))*a[1]/sqrt(a[1]^2 + b[1]^2), (a[1]*b[1]/sqrt(a[1]^2 + b[1]^2) + a[2]*b[1]/sqrt(a[1]^2 + b[1]^2))*a[1]/sqrt(a[1]^2 + b[1]^2) - (a[1]^2/sqrt(a[1]^2 + b[1]^2) + b[1]^2/sqrt(a[1]^2 + b[1]^2))*b[1]/sqrt(a[1]^2 + b[1]^2), b[1]*b[2]/sqrt(a[1]^2 + b[1]^2), 0;
    -(b[1]^2/sqrt(a[1]^2 + b[1]^2) - a[1]*a[2]/sqrt(a[1]^2 + b[1]^2))*b[1]/sqrt(a[1]^2 + b[1]^2), -(b[1]^2/sqrt(a[1]^2 + b[1]^2) - a[1]*a[2]/sqrt(a[1]^2 + b[1]^2))*a[1]/sqrt(a[1]^2 + b[1]^2), a[1]*b[2]/sqrt(a[1]^2 + b[1]^2), 0;
    b[1]*b[2]/sqrt(a[1]^2 + b[1]^2), a[1]*b[2]/sqrt(a[1]^2 + b[1]^2), a[3], b[3];
    0, 0, b[3], a[4]
]
